new relay.Fdr monitoredobj=line.OH_B5218 monitoredterm=1 switchedterm=1
~ phasecurve=104 phasetrip=600 tdphase=1
~ groundcurve=106 groundtrip=400 tdground=1
~ shots=4 recloseintervals=(2, 2, 5) breakertime=0.032
new relay.A like=Fdr monitoredobj=line.OH_B4808 phasetrip=400 groundtrip=250
new relay.B like=Fdr monitoredobj=line.OH_B4760 phasetrip=200 groundtrip=150
new relay.C like=Fdr monitoredobj=line.OH_B18859 phasetrip=200 groundtrip=150
new relay.D like=Fdr monitoredobj=line.OH_B19006 phasetrip=150 groundtrip=100
