redirect DistanceRelays.dss
new Relay.dist_PV type=distance monitoredobj=Transformer.Tg monitoredterm=1 switchedobj=vccs.PV switchedterm=1 breakertime=0.032
~ shots=1 Reset=5.0 delay=0.5 Z1Mag=84.8 Z1Ang=10.0 Z0Mag=84.8 Z0Ang=10.0 Mphase=1.0 Mground=1.0 debugtrace=no distreverse=yes phasetrip=84.0
