new TCC_Curve.Klink npts = 8
~ C_array=(  2.0,  2.2, 3.0, 4.0, 6.0,  30.0,  50.0, 250.0)
~ T_array=(300.0, 20.0, 4.0, 1.3, 0.41, 0.02, 0.014, 0.014)

// 1547-2003
new TCC_Curve.OV1547 npts = 2 C_array=(1.20, 1.10) T_array=(0.16, 1.0)
new TCC_Curve.UV1547 npts = 2 C_array=(0.50, 0.88) T_array=(0.16, 2.0)

// 1547-2018 category I defaults
new TCC_Curve.OV1547_1 npts = 2 C_array=(1.20, 1.10) T_array=(0.16, 2.0)
new TCC_Curve.UV1547_1 npts = 2 C_array=(0.45, 0.70) T_array=(0.16, 2.0)

// 1547-2018 category II default voltages and maximum times
new TCC_Curve.OV1547_2 npts = 2 C_array=(1.20, 1.10) T_array=(0.16, 13.0)
new TCC_Curve.UV1547_2 npts = 2 C_array=(0.45, 0.70) T_array=(2.00, 21.0)

// 1547-2018 category III near-zero voltages and maximum times
new TCC_Curve.OV1547_3 npts = 2 C_array=(1.20, 1.10) T_array=(0.16, 13.0)
new TCC_Curve.UV1547_3 npts = 2 C_array=(0.10, 0.60) T_array=(21.0, 50.0)

// 1547-2018 category IIIr near-zero voltages, shorten time for near-zero voltage, for residential PV
new TCC_Curve.OV1547_4 npts = 2 C_array=(1.20, 1.10) T_array=(0.16, 13.0)
new TCC_Curve.UV1547_4 npts = 2 C_array=(0.20, 0.60) T_array=(3.00, 50.0)

// from the Hull Distributed Wind Study
new TCC_Curve.Form4_116 npts = 8
~ C_array=(1.0, 1.5, 8.00, 10.0, 15.0, 20.00, 30.00, 100.0)
~ T_array=(6.3, 2.2, 0.06, 0.04, 0.02, 0.012, 0.011, 0.011)

new TCC_Curve.Form4_136 npts = 9
~ C_array=( 1.0, 1.3,  1.5, 4.0, 9.0,  13.0,  15.0,  20.0,  100.0)
~ T_array=(25.0, 8.0,  4.5, 0.9, 0.12, 0.025, 0.018, 0.015, 0.015)

// from the IEEE DG Protection Feeder
new TCC_Curve.101 npts=8 c_array=(1.0   1.5   1.7   2.0   2.5   3.0   6.0   10.0)
~                        t_array=(0.140 0.036 0.025 0.022 0.018 0.016 0.015 0.015)
new TCC_Curve.133 npts=7 c_array=(1.0  10.0  15.0  25.0  35.0  50.0  100.0)
~                        t_array=(14.0 0.16  0.09  0.052 0.042 0.039 0.039)
new TCC_Curve.104 npts=10 c_array=(1.0  2.0  3.0  3.5   4.0   5.0   6.0    10.0  15.0  100.0)
~                         t_array=(0.51 0.16 0.07 0.045 0.027 0.019 0.0155 0.012 0.011 0.011)
new TCC_Curve.106 npts=11 c_array=(1.0 1.5 3.0  4.0  4.5   5.0   6.0   8.0   10.0  15.0   100.0)
~                         t_array=(1.5 0.4 0.08 0.03 0.021 0.017 0.014 0.012 0.011 0.0105 0.0105)
new TCC_Curve.117 npts=13 c_array=(1.0 1.5 2.0 2.5 3.0  4.0  5.0  6.0  10.0 20.0  30.0  40.0  100.0)
~                         t_array=(6.0 2.5 1.5 1.0 0.69 0.40 0.26 0.20 0.09 0.026 0.017 0.016 0.016)
new TCC_Curve.135 npts=13 c_array=(1.0  1.5 2.0 2.5 3.0 4.0 5.0 6.0  8.0  10.0 15.0 30.0 100.0)
~                         t_array=(15.0 6.5 3.9 2.6 2.0 1.4 1.1 0.91 0.72 0.63 0.54 0.52 0.52)
